// COMSOL Multiphysics 5.6.0.280 model "viga4.mph"
// Outline of the model tree

Parameters
  L = 0.7  // Longueur poutre
  b = 2e-2  // Largeur poutre
  e = 1e-2  // Epaisseur poutre
  E1 = 70e9  // Module Young
  nu1 = 0.3  // Coefficient Poisson
  eta1 = 0.005  // Facteur de perte
  rho1 = 2700  // Masse volumique
  x_F = 0.1  // Abscisse Effort ponctuel
  F = 1  // Amplitude effort
  x_E1 = 0.4  // Abscisse changement module
  x_E2 = 0.45  // Abscisse fin changement module
  E2 = 0.8*E1  // Module Young modifié
  x0 = 0.3  // Abscisse premier point mesure
  dx = 0.031  // Pas de mesure
  Nx = 10  // Nb points de mesure
  freq_min = 500  // Fréquence min
  freq_max = 600  // Fréquence max
  freq_step = 2  // Pas en fréquence
  m = 0.32
  u = 0.03

Functions
  an1: Analytic "E_variable" | expr = (((((1/(u*sqrt(2*pi)))*exp((-0.5)*(((x-m)/u))^2))/-40 ))+1)*E1
  an2: Analytic "Test" | expr = E1

Common definitions
  mpf1: ParticipationFactors

Geometry
  geom1 "Geometry 1" (2D, length unit m)
    ls1: LineSegment | specify1 = coord; specify2 = coord; coord2 = {x_E1, 0}
    ls2: LineSegment | specify1 = coord; coord1 = {x_E1, 0}; specify2 = coord; coord2 = {x_E2, 0}
    ls3: LineSegment | specify1 = coord; coord1 = {x_E2, 0}; specify2 = coord; coord2 = {L, 0}
    pt1: Point (disabled) | p = {x0, }
    arr1: Array (disabled) | input = pt1; size = {Nx, 1}; fullsize = {Nx, 1}; displ = {dx, 0}
    pt2: Point "Point F" | p = {x_F, }
    fin: Finalize "Form Union"

Materials
  mat1: Common "Material 1" on boundaries 1-4
    def "Basic"
      youngsmodulus = E1*(1+i*eta1)
      poissonsratio = nu1
      density = rho1
  mat2: Common "Material 2" (disabled) on boundaries 3
    def "Basic"
      youngsmodulus = E2*(1+i*eta1)
      poissonsratio = nu1
      density = rho1
  mat3: Common "Material 3"
    def "Basic"
      youngsmodulus = an1

Physics
  beam: HermitianBeam on all boundaries
    dependent variable u = {u, v, w}
    emm1: Elastic "Linear Elastic Material 1" (default)
    csd1: CrossSectionBeam "Cross-Section Data 1" (default)
      CrossSectionDefinition = CommonSections
      hy_rect = e
      hz_rect = b
    free1: Free (default)
    init1: init "Initial Values 1" (default)
    fix1: Fixed "Fixed Constraint 1" on points 1
    pl1: PointLoad on points 2 | Fp = {0, F, 0}

Mesh
  mesh1 "Mesh 1"
    size: MeshSizeDefault | hauto = 1
    edg2: Edge on all boundaries

Studies
  std1 "Study 1"
    freq: Frequency "Frequency Domain" | plist = 577

Solver configurations
  sol1 "Solution 1" (study std1)
    v1: Variables "Dependent Variables 1"
    s1: Stationary "Stationary Solver 1"
      dDef: Direct
      p1: Parametric | pname = freq; plistarr = 577; punit = Hz; pcontinuationmode = no
      fc1: FullyCoupled

Datasets
  mesh1: Mesh
  dset1: Solution | solution = sol1

Derived values
  pev1: EvalPoint "Point Evaluation 1" on points 5 | data = dset1; table = tbl7; expr = abs(v); unit = m

Tables
  tbl3: Table
    // Point Evaluation 1
    freq (Hz) | Displacement field, y component (m), Point: 2
    500 | 1.23156e-06
  tbl4: Table
    // Line Maximum 1
    freq (Hz) | Displacement field, y component (m) | Displacement field, y component (m) | Displacement field, x component (m)
    500 | 1.46734e-06 | 1.46734e-06 | 0
  tbl7: Table
    // Point Evaluation 1
    freq (Hz) | abs(v) (m), Point: 5
    1 | 2.86846e-05
    2 | 2.90292e-05
    3 | 2.96204e-05
    4 | 3.04855e-05
    5 | 3.16674e-05
    6 | 3.32297e-05
    7 | 3.52669e-05
    8 | 3.79205e-05
    9 | 4.14082e-05
    10 | 4.60796e-05
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
Plots
  pg1: PlotGroup2D "Mesh Plot 1" | data = mesh1
  pg2: PlotGroup2D "Stress (beam)" | data = dset1
    line1: Line | expr = beam.mises; linetype = tube; radiusexpr = beam.re
      def: Deform "Deformation" | expr = {u, v}
  pg3: PlotGroup2D "Moment (beam)" | data = dset1
    line1: Line | expr = beam.Mzl; linetype = tube; radiusexpr = beam.re
      def: Deform "Deformation" | expr = {u, v}
  pg4: PlotGroup2D "Shear Force (beam)" | data = dset1
    line1: Line | expr = beam.Tyl; linetype = tube; radiusexpr = beam.re
      def: Deform "Deformation" | expr = {u, v}
  pg5: PlotGroup2D "Axial Force (beam)" | data = dset1
    line1: Line | expr = beam.Nxl; linetype = tube; radiusexpr = beam.re
      def: Deform "Deformation" | expr = {u, v}
  pg6: PlotGroup2D "Point Loads (beam)" | data = dset1
    arpt1: ArrowPoint "Point Load 1" | expr = {beam.pl1.F_Px, beam.pl1.F_Py}; descr = Load
      col: Color "Color Expression" | expr = beam.pl1.F_P_Mag
      def: Deform "Deformation" | expr = {u, v}
  pg7: PlotGroup1D "1D Plot Group 7" | data = dset1
    lngr1: LineGraph on boundaries 1-4 | expr = beam.disp; xdata = expr; xdataexpr = x